# -----------------  Расчет габаритов радиального колеса одинарной кривизны /Ломакин/ -------------------
# Область применимости метода расчета ns = 30 - 150
g := 9.80665
n := n_sin*(1 - S/100)
Q_pot := Q/(3600*Zpot)
H_st := H/Zst
ns := 3.65*n*sqrt(Q_pot)/H_st^0.75
ns = 53.7162
D1pr := 4.25*10^3*(Q_pot/n)^(1/3)
D1pr = 168.253
η_g := 1 - 0.42/(1/ln(10)*ln(D1pr) - 0.173)^2
η_g = 0.900348
1/ln(10) = 0.434294
η_ob := 1/(1 + 0.68*ns^(-2/3))
η_ob = 0.954413
η_dt := 1/(1 + 820/ns^2)
η_dt = 0.778703
η := η_g*η_ob*η_dt
η = 0.669142
N := ρ*Q*H/(102*3600*η)
N = 205.41
Nmax := 1.2*N
Ckr_kons := if(ns ≥ 250, 1200, 1.85*ns + 737.5)
Ckr_kons = 836.875
Ckr_proh := if(ns ≥ 250, 1000, 1.6*ns + 600)
Ckr_proh = 685.946
Ckr_ras := if(Zst > 1 or Zpot > 1, Ckr_proh, Ckr_kons)
Ckr_ras = 685.946
Ckr := if(Ckr == 0, Ckr_ras, Ckr)
Ckr = 685.946
ΔH_kr := 10*((n*sqrt(Q_pot))/Ckr)^(4/3)
ΔH_kr = 5.48468
ΔH_dop := 1.2*ΔH_kr
ΔH_dop = 6.58162
# +++++++++++++++++++++++++++++++++++++++++++++++++++++++++++++++++++
η_ := η_g_*η_ob_*η_dt_
η_ = 0.668849
N_ := ρ*Q*H/(102*3600*η_)
N_ = 205.5
Nmax_ := 1.2*N_
Nmax_ = 246.6
M := 97500*Nmax_/n
M = 16524.8
dval_Zst := 10*(M/(0.2*150))^(1/3)
dval_Zst = 81.9731
dval_1st := 10*(M/(0.2*Zst*150))^(1/3)
dval_1st = 81.9731
_dvt_Zst := 1.25*dval_Zst
_dvt_Zst = 102.466
dvt = 102.5
Q1 := Q_pot/η_ob_
Q1 = 0.0946308
Vo := Kvo*(Q1*n^2)^(1/3)
Vo = 3.51078
Do := 1000*sqrt((4*Q1/(π*Vo)) + (dvt/1000)^2)
Do = 211.72
D1 := D1osn_otn*Do
D1 = 201.134
D1_pr := D1prom_otn*D1
D1_pr = 201.134
Vm1p := Kvm1*Vo
Vm1p = 2.98417
b1 := 1000*Q1/(π*0.001*D1*Vm1p)
b1 = 50.1849
u1D1 := 0.001*D1*π*n/60
u1D1 = 15.3232
u1Do := 0.001*Do*π*n/60
u1Do = 16.1296
# ++++++++++++++++++++
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# ++++++++++++++++++++
K1 := 1/(1 - ((Z1*S1)/(π*D1*sin(π*β1/180))))
K1 = 1.24987
δ1 := β1 - (180/π)*atan((Vm1p*K1)/u1D1)
δ1 = 10.3197
β1 = 24
β1o := (180/π)*atan((Vm1p*K1)/u1D1)
β1o = 13.6803
Vm1p = 2.98417
β1 - β1o = 10.3197
β1pDo := (180/π)*atan(Vm1p/u1Do)
β1pDo = 10.4819
Vm1 := K1*Vm1p
Vm1 = 3.72981
W1D1 := Vm1/sin(π*β1/180)
W1D1 = 9.17008
W1oD1 := Vm1/sin(π*β1o/180)
W1oD1 = 15.7706
W1oD1 := sqrt(u1D1^2 + Vm1^2)
W1oD1 = 15.7706
W1oDo := sqrt(u1Do^2 + Vm1^2)
W1oDo = 16.5553
ΔH_kr_ := mo*Vo^2/(2*g) + no*W1oD1^2/(2*g)
ΔH_kr_ = 5.8264
ΔH_ras/ΔH_kr_ = 2.69137
C_kr_ := (n*sqrt(Q_pot))/(0.1*ΔH_kr_)^(3/4)
C_kr_ = 655.546
Vm2p := Kvm2*Vm1p
Vm2p = 2.98417
Ht := H_st/η_g_
Ht = 102.222
u2 := sqrt(2*g*Ht)
u2 = 44.7763
D2 := (1000*2*u2)/(π*n/30)
D2 = 587.742
P := 0.1
Ppr := 0.1
K2 := 1.1
a := 2*tan(π*β2/180)
Given
Ppr == 2/(Z1*Z2otn)*(0.6 + 0.6*sin(π*β2/180))/(1 - (D1_pr/D2)^2)
P == ((2/(Z1*Z2otn)*(0.6 + 0.6*sin(π*β2/180))/(1 - (D1/D2)^2)) + (Z2otn - 1)*Ppr)/Z2otn
K2 == 1/(1 - ((Z1*Z2otn*S2)/(π*D2*sin(π*β2/180))))
u2 == (K2*Vm2p/a) + sqrt((K2*Vm2p/a)^2 + g*(1 + P)*Ht)
D2 == 1000*(60*u2)/(π*n)
X1 := Find(Ppr, P, K2, u2, D2)
X1 = [0.286971; 0.286971; 1.08057; 39.542; 519.036]
Ppr := X1[0]
P := X1[1]
K2 := X1[2]
u2 := X1[3]
D2 := X1[4]
Vu2 := g*Ht/u2
Vu2 = 25.3517
Vm2 := K2*Vm2p
Vm2 = 3.22459
W2 := Vm2/sin(π*β2/180)
W2 = 7.63002
Kw := W1D1/W2
Kw = 1.20184
b2 := 1000*Q1/(π*0.001*D2*Vm2p)
b2 = 19.4474
α2 := (180/π)*atan(Vm2p/Vu2)
α2 = 6.71344
V2p := sqrt(Vu2^2 + Vm2p^2)
V2p = 25.5267
_Z2 := if(ns ≤ 60, 9, if(ns ≤ 120, 8, if(ns ≤ 160, 7, 6)))
_Z2 = 9
Z2 := Z1*Z2otn
Z2 = 7
β1p := (180/π)*atan(Vm1p/u1D1)
β1p = 11.0203
D1prom_otn_ := if(D2/D1 ≤ 2, sqrt(D2/D1), sqrt(2))
D1prom_otn_ = 1.41421
_S1 := ((1.25 - 1)/1.25)*π*D1*sin(π*β1/180)/Z1
_S1 = 7.34314
_S2 := ((1.075 - 1)/1.075)*π*D2*sin(π*β2/180)/_Z2
_S2 = 5.34203
# _______________________Диаграмма  Айзенштейн________________________________
ns1 := [30; 60; 70; 80; 90]
KD2_1 := [84.6; 85; 86; 88; 91]
Kb2_1 := [2.3; 2.4; 3.7; 5; 6]
Kb1_1 := [5.8; 6.1; 9; 10.6; 11.9]
KD0_1 := [27; 28; 34; 38; 40]
KD0ekv_1 := [23; 24; 30; 34; 35.5]
KD1_1 := [26; 27; 28; 31; 34]
ns2 := [80; 90; 100; 120; 140; 160; 180; 200; 250]
KD2_2 := [85.8; 86; 87; 89; 91; 93.5; 96; 99; 105]
Kb2_2 := [4.5; 5; 5.5; 7.3; 9.5; 12; 14.5; 16.6; 21]
Kb1_2 := [12.8; 13; 13.5; 14.5; 17; 19.5; 22; 25; 30]
KD0_2 := [42; 42; 43; 47; 52; 57; 62; 68; 81]
KD0ekv_2 := [38; 39; 40; 44; 48; 52; 58; 63; 75]
KD1oc_2 := [24; 25; 25.6; 27; 29; 31; 34; 36; 45]
n_reg := 3
n_reg2 := 3
k_R := regress(ns1, KD2_1, n_reg)
k_R2 := regress(ns2, KD2_2, n_reg2)
KD2 := if(ns < 88, interp(k_R, ns1, KD2_1, ns), interp(k_R2, ns2, KD2_2, ns))
n_reg := 3
n_reg2 := 4
k_R := regress(ns1, Kb2_1, n_reg)
k_R2 := regress(ns2, Kb2_2, n_reg2)
Kb2 := if(ns < 88, interp(k_R, ns1, Kb2_1, ns), interp(k_R2, ns2, Kb2_2, ns))
Kb2 := if(ns < 60, 2.4, Kb2)
n_reg := 4
n_reg2 := 4
k_R := regress(ns1, Kb1_1, n_reg)
k_R2 := regress(ns2, Kb1_2, n_reg2)
Kb1 := if(ns < 90, interp(k_R, ns1, Kb1_1, ns), interp(k_R2, ns2, Kb1_2, ns))
Kb1 := if(ns < 60, 6.1, Kb1)
n_reg := 4
n_reg2 := 3
k_R := regress(ns1, KD0_1, n_reg)
k_R2 := regress(ns2, KD0_2, n_reg2)
KD0 := if(ns < 90, interp(k_R, ns1, KD0_1, ns), interp(k_R2, ns2, KD0_2, ns))
KD0 := if(ns < 60, 28, KD0)
n_reg := 3
n_reg2 := 3
k_R := regress(ns1, KD0ekv_1, n_reg)
k_R2 := regress(ns2, KD0ekv_2, n_reg2)
KD0ekv := if(ns < 90, interp(k_R, ns1, KD0ekv_1, ns), interp(k_R2, ns2, KD0ekv_2, ns))
KD0ekv := if(ns < 60, 24, KD0ekv)
n_reg := 3
n_reg2 := 3
k_R := regress(ns1, KD1_1, n_reg)
k_R2 := regress(ns2, KD1oc_2, n_reg2)
KD1 := if(ns < 90, interp(k_R, ns1, KD1_1, ns), 0)
KD1 := if(ns < 50, 26, KD1)
KD1oc := if(ns < 90, 0, interp(k_R2, ns2, KD1oc_2, ns))
KD0ekv = 24
KD1 = 26.2669
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KD1oc = 0
KD0 = 28
Kb1 = 6.1
KD2 = 84.6538
Kb2 = 2.4
# Обозначения на рисунке и диаграмме
# D1oc = D''1;  De = Do
# D1п непонятно м.б.  D1 ?
# Исходные данные: | Результаты расчета
# Подача , м3/ч
Q ≡ 650
# *
# *
# *
# *
# *
# *
# *
# *
# *
# *
# *
# *
# *
# *
# *
# *
# Частота вращения, об/мин
n = 1455
# Напор ,  м
H ≡ 92
# Коэффициент быстроходности
# одной ступени и одного потока
ns = 53.7162
# Расп. кав. запас, м
ΔH_ras ≡ 15.681
# Плотность, кг/м3
ρ ≡ 844
# КПД проточной части
η = 0.669142
# -------------------------------------------------------------------
# Мощность проточной части, кВт
N = 205.41
# Принимаем :
# Кавитационный коэффициет Скр
Ckr = 685.946
# Количество ступеней
Zst ≡ 1
# Критический кав. запас, м
ΔH_kr = 5.48468
# Количество потоков
Zpot ≡ 2
# Допускаемый кав. запас, м
ΔH_dop = 6.58162
# Скольжение , %
S ≡ 3
# Синхронная частота, об/мин
n_sin ≡ 1500
# Отношение
ΔH_ras/ΔH_kr = 2.85905
# Коэфф. Скр (= 0, при расчете f(ns))
Ckr ≡ 0
# ---------------------------------------------------------------------------------------------------------------------------------------------------
# Обозначение
# Варьируемые параметры
# *
# *
# *
# *
# *
# *
# *
# *
# *
# *
# *
# *
# *
# *
# *
# Результаты расчета
# Рекомендуемый диапазон, либо значение
ΔH_kr_ = 5.8264
# *
# *
# *
# *
# *
# *
# *
# *
# *
# *
# *
# *
# *
# *
# *
# *
# *
# *
# *
# *
H = 92
H/Zst = 92
# *
# *
# *
# *
# *
# *
# *
# *
# *
# *
# *
# *
# *
# *
# *
# *
# *
# *
# *
# Принимаем
ΔH_ras/ΔH_kr_ = 2.69137
Ht = 102.222
η_g = 0.900348
η_g_ ≡ 0.9
η_ob = 0.954413
η_ob_ ≡ 0.954
C_kr_ = 655.546
η_ = 0.668849
η_dt = 0.778703
η_dt_ ≡ 0.779
Do = 211.72
N_ = 205.5
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# /Kvo=0.06 - 0.08/
Kvo ≡ 0.06
D1 = 201.134
Nmax_ = 246.6
# /Kvm1=0.5 - 1.1/
Kvm1 ≡ 0.85
D1_pr = 201.134
P = 0.286971
# /Kvm2=0.5 - 1 /
Kvm2 ≡ 1
b1 = 50.1849
D2 = 519.036
# /D1osn_otn=D1/Do=0.8 -1/
D1osn_otn ≡ 0.95
K1 = 1.24987
b2 = 19.4474
# /D1prom_otn=D1_pr/D1/
D1prom_otn ≡ 1
Vo = 3.51078
K2 = 1.08057
dval_1st = 81.9731
dval_Zst = 81.9731
dvt ≡ 102.5
Vm1p = 2.98417
Vu2 = 25.3517
# /консольное РК  dvt = 0/
_dvt_Zst = 102.466
Vm1 = 3.72981
Vm2p = 2.98417
S1 ≡ 7.34
_S1 = 7.34314
W1D1 = 9.17008
Vm2 = 3.22459
S2 ≡ 7.34
_S2 = 5.34203
W1oD1 = 15.7706
W2 = 7.63002
Z1 ≡ 7
Z2 = 7
# *
# *
# *
# *
# *
# *
_Z2 = 9
u1D1 = 15.3232
u2 = 39.542
Z2otn ≡ 1
u1Do = 16.1296
α2 = 6.71344
# / W1D1/W2 < 1.4 ; для ns<60 до 2.5 /
β2 ≡ 25
δ1 = 10.3197
# / β1= 20-25. δ1=3 - 8 гр ; для ns<60 до 15 -18 /
β1 ≡ 24
W1D1/W2 = 1.20184
β1o = 13.6803
# / Оптим. по опасн. возникн. кавитации β1p~18гр
# mo=1-1.2;no=0.3-0.4  рек.принять mo=1.2 no=0.4 /
mo ≡ 1.2
no ≡ 0.4
β1p = 11.0203
D2 := 1000*KD2*sqrt(H_st)/n
D2 = 558.056
b2 := 1000*Kb2*sqrt(H_st)/n
b2 = 15.8213
D0 := 1000*KD0*sqrt(H_st)/n
D0 = 184.582
b1 := 1000*Kb1*sqrt(H_st)/n
b1 = 40.2125
D0ekv := 1000*KD0ekv*sqrt(H_st)/n
D0ekv = 158.213
D1 := 1000*KD1*sqrt(H_st)/n
D1 = 173.157
D1oc := 1000*KD1oc*sqrt(H_st)/n
D1oc = 0
dvt := sqrt((D0^2) - (D0ekv^2))
dvt = 95.0742
# ___________________Диаграмма  Айзенштейн  (ns = 30 - 250)__________________
D0ekv = 158.213
D1 = 173.157
D1oc = 0
D0 = 184.582
D2 = 558.056
# Обозначения на рисунке и диаграмме
# D1oc = D''1;  De = Do
# D1п непонятно м.б.  D1 ?
dvt = 95.0742
b1 = 40.2125
b2 = 15.8213
