# ПРОФИЛИРОВАНИЕ  ЛОПАСТИ РАБОЧЕГО КОЛЕСА
N := 100
i := 0 .. N
R0 := 0.5*0.2117
R1 := 0.5*0.2011
b1 := 0.0502
β1 := 24
δ1 := 0.00734
Q := 650/3600
η_ob := 0.954
n := 1455
R_vt := 0.5*0.1025
R2 := 0.5*0.519
b2 := 0.0194
β2 := 25
δ2 := 0.00734
Z1 := 7
R1_kor_lop := 1*0
k_Z := 1
Z2 := k_Z*Z1
# (k_Z=1 - коротких лопаток нет)
C0 := Q/(π*(R0^2 - R_vt^2)*η_ob)
C0 = 7.02334
u1 := (π*n*R1)/30
u1 = 15.3205
m := 0 .. 2
Rb[0] := R1
Rb[2] := R2
Rb[1] := R1 + Rb_*(R2 - R1)
b[1] := b_*(b2 + b1)
b[0] := b1
b[2] := b2
Rβ[0] := R1
Rβ[2] := R2
Rβ[1] := R1 + Rβ_*(R2 - R1)
β[1] := β_*(β2 + β1)
β[0] := β1
β[2] := β2
Rδ[0] := R1
Rδ[2] := R2
Rδ[1] := R1 + Rδ_*(R2 - R1)
δ[1] := δ_*(δ2 + δ1)
δ[0] := δ1
δ[2] := δ2
data_b[:, 0] := Rb
data_b[:, 1] := b
data_β[:, 0] := Rβ
data_β[:, 1] := β
data_δ[:, 0] := Rδ
data_δ[:, 1] := δ
data_b := csort(data_b, 0)
data_β := csort(data_β, 0)
data_δ := csort(data_δ, 0)
Sb := lspline(Rb, b)
Sβ := lspline(Rβ, β)
Sδ := lspline(Rδ, δ)
B(R_tec) := interp(Sb, Rb, b, R_tec)
β(R_tec) := interp(Sβ, Rβ, β, R_tec)
δ(R_tec) := interp(Sδ, Rδ, δ, R_tec)
R_tec[i] := R1 + (R2 - R1)*i/N
b_r[i] := B(R_tec[i])
β_r[i] := β(R_tec[i])
θ[i] := integral(1/(r_t*tan(π*β(r_t)/180)), r_t = R1 .. R_tec[i])
δ_r[i] := 0.5*δ(R_tec[i])/sin(π*β(R_tec[i])/180)
δ[i] := δ(R_tec[i])
Z[i] :=
    Z1 if R_tec[i] ≤ R1_kor_lop
    Z2 otherwise
k1 :=
    k1 ← 0
    for i ∈ 0 .. N - 1
        k1 ← k1 + 1
        if R_tec[i] ≥ R1_kor_lop
            {
                break
            }
    k1
k1 = 1
ii := k1 .. N
v_m[i] := (Q/η_ob)*(0.5/(b_r[i]*(π*R_tec[i] - Z[i]*δ_r[i])))
w[i] := v_m[i]/sin(π*β(R_tec[i])/180)
β1_pot := (180/π)*atan(v_m[0]/u1)
β1_pot = 25.9597
# ПОСТРОЕНИЕ вида лопастей
θ_tyl[i] := θ[i] + δ_r[i]/R_tec[i]
θ_rab[i] := θ[i] - δ_r[i]/R_tec[i]
θ_1[i] := π - θ[i]
θ_1_tyl[i] := θ_1[i] + δ_r[i]/R_tec[i]
θ_1_rab[i] := θ_1[i] - δ_r[i]/R_tec[i]
θ_2[ii] := θ_1[ii] - 2*π/Z2
θ_2_tyl[ii] := θ_2[ii] + δ_r[ii]/R_tec[ii]
θ_2_rab[ii] := θ_2[ii] - δ_r[ii]/R_tec[ii]
θ_3[i] := θ_1[i] - 2*π/Z1
θ_3_tyl[i] := θ_3[i] + δ_r[i]/R_tec[i]
θ_3_rab[i] := θ_3[i] - δ_r[i]/R_tec[i]
# Определение координат профиля для построения чертежа
# (принято шаг по углу фи=10 град)
Shag := 10
N_fi := ceil(θ[N]*180/(π*Shag))
N_fi = 13
j := 0 .. N_fi
jj := 0 .. N_fi - 1
ϕ[0] := 0  # - начальный угол
ϕ[jj + 1] :=
    (ϕ[jj] + Shag) if jj < N_fi - 1
    θ[N]*180/π otherwise
# Определение координат средней линии профиля для построения чертежа R=f(фи)
# ( Точки на рисунке см ниже. показаны "o")
SR_ := lspline(θ, R_tec)
# Аналогично для построения
# определим ширину РК
B(ϕ) := interp(SR_, θ, R_tec, ϕ)
Sb_ := lspline(R_tec, b_r)
R_sr[j] := B(ϕ[j]*π/180)  # - текущий радиус
B_(R) := interp(Sb_, R_tec, b_r, R)
ϕ_ := π - (ϕ*π/180)  # - текущий угол фи для построения графика
b_r_[j] := B_(R_sr[j])
R_sr[j] = [0.10055; 0.108679; 0.117474; 0.126991; 0.137293; 0.14845; 0.160537; 0.173642; 0.187865; 0.203324; 0.220156; 0.238529; 0.258635; 0.2595]
b_r_[j] = [0.0502; 0.0479083; 0.0454472; 0.0428279; 0.0400729; 0.03722; 0.0343283; 0.0314862; 0.0287998; 0.0262981; 0.0239615; 0.0217322; 0.0194946; 0.0194]
ϕ[N_fi] = 120.411
θ[N]*180/π = 120.411
R_sr[N_fi] = 0.2595
R_tec[N] = 0.2595
SR_rab := lspline(θ_rab, R_tec)
SR_tyl := lspline(θ_tyl, R_tec)
B_rab(ϕ) := interp(SR_rab, θ_rab, R_tec, ϕ)
B_tyl(ϕ) := interp(SR_tyl, θ_tyl, R_tec, ϕ)
R_rab[j] := B_rab(ϕ[j]*π/180)
R_tyl[j] := B_tyl(ϕ[j]*π/180)
ϕ_rab := ϕ
ϕ_tyl := ϕ
ϕ_rab[N_fi] := θ_rab[N]*180/π
ϕ_tyl[N_fi] := θ_tyl[N]*180/π
R_rab[N_fi] := B_rab(ϕ_rab[N_fi]*π/180)
R_tyl[N_fi] := B_tyl(ϕ_tyl[N_fi]*π/180)
ϕ_rab[N_fi] = 118.493
ϕ_tyl[N_fi] = 122.328
R_rab[N_fi] = 0.2595
R_tyl[N_fi] = 0.2595
# текущий угол фи для построения графика
ϕ_rab_ := π - (ϕ_rab*π/180)
ϕ_tyl_ := π - (ϕ_tyl*π/180)
b_ ≡ 0.45
Rb_ ≡ 0.465
δ_ ≡ 0.62
Rδ_ ≡ 0.1
β_ ≡ 0.5
Rβ_ ≡ 0.7
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δ[0] = 0.00734
δ[N] = 0.00734
min(δ) = 0.00734
max(δ) = 0.0114624
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β1_pot = 25.9597
C0 = 7.02334
u1 = 15.3205
v_m[0] = 7.45897
max(v_m) = 7.45897
v_m[N] = 6.46543
min(v_m) = 6.43419
max(v_m)/min(v_m) = 1.15927
w[0] = 18.3386
max(w) = 18.3386
w[N] = 15.2985
min(w) = 15.2884
max(w)/min(w) = 1.19951
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R_sr := 1000*R_sr
R_rab := 1000*R_rab
R_tyl := 1000*R_tyl
# Координаты входной кромки лопасти
ϕ[0] = 0
R_sr[0] = 100.55
0.5*10^3*δ[0] = 3.67
# Координаты профиля лопасти | Координаты покрывного диска
ϕ_rab[j] = [0; 10; 20; 30; 40; 50; 60; 70; 80; 90; 100; 110; 120; 118.493]
R_rab[j] = [104.748; 113.389; 122.654; 132.564; 143.169; 154.525; 166.699; 179.765; 193.816; 208.961; 225.34; 243.127; 262.494; 259.5]
ϕ_tyl[j] = [0; 10; 20; 30; 40; 50; 60; 70; 80; 90; 100; 110; 120; 122.328]
R_tyl[j] = [96.5218; 104.331; 112.603; 121.628; 131.51; 142.337; 154.209; 167.234; 181.533; 197.24; 214.503; 233.486; 254.354; 259.5]
R_sr[j] = [100.55; 108.679; 117.474; 126.991; 137.293; 148.45; 160.537; 173.642; 187.865; 203.324; 220.156; 238.529; 258.635; 259.5]
(1000*b_r_)[j] = [50.2; 47.9083; 45.4472; 42.8279; 40.0729; 37.22; 34.3283; 31.4862; 28.7998; 26.2981; 23.9615; 21.7322; 19.4946; 19.4]
