# ПРОФИЛИРОВАНИЕ  ЛОПАСТИ РАБОЧЕГО КОЛЕСА
N := 100
i := 0 .. N
R0 := 0.5*0.2117
R1 := 0.5*0.2011
b1 := 0.0502
β1 := 21
δ1 := 0.010
Q := 650/3600
η_ob := 0.954
n := 1455
R_vt := 0.5*0.1025
R2 := 0.5*0.5173
b2 := 0.0195
β2 := 25
δ2 := 0.010
Z1 := 7
R1_kor_lop := 1*0
k_Z := 1
Z2 := k_Z*Z1
# (k_Z=1 - коротких лопаток нет)
C0 := Q/(π*(R0^2 - R_vt^2)*η_ob)
C0 = 7.02334
u1 := (π*n*R1)/30
u1 = 15.3205
m := 0 .. 2
Rb[0] := R1
Rb[2] := R2
Rb[1] := R1 + Rb_*(R2 - R1)
b[1] := b_*(b2 + b1)
b[0] := b1
b[2] := b2
Rβ[0] := R1
Rβ[2] := R2
Rβ[1] := R1 + Rβ_*(R2 - R1)
β[1] := β_*(β2 + β1)
β[0] := β1
β[2] := β2
Rδ[0] := R1
Rδ[2] := R2
Rδ[1] := R1 + Rδ_*(R2 - R1)
δ[1] := δ_*(δ2 + δ1)
δ[0] := δ1
δ[2] := δ2
data_b[:, 0] := Rb
data_b[:, 1] := b
data_β[:, 0] := Rβ
data_β[:, 1] := β
data_δ[:, 0] := Rδ
data_δ[:, 1] := δ
data_b := csort(data_b, 0)
data_β := csort(data_β, 0)
data_δ := csort(data_δ, 0)
Sb := lspline(Rb, b)
Sβ := lspline(Rβ, β)
Sδ := lspline(Rδ, δ)
B(R_tec) := interp(Sb, Rb, b, R_tec)
β(R_tec) := interp(Sβ, Rβ, β, R_tec)
δ(R_tec) := interp(Sδ, Rδ, δ, R_tec)
R_tec[i] := R1 + (R2 - R1)*i/N
b_r[i] := B(R_tec[i])
β_r[i] := β(R_tec[i])
θ[i] := integral(1/(r_t*tan(π*β(r_t)/180)), r_t = R1 .. R_tec[i])
δ_r[i] := 0.5*δ(R_tec[i])/sin(π*β(R_tec[i])/180)
δ[i] := δ(R_tec[i])
Z[i] :=
    Z1 if R_tec[i] ≤ R1_kor_lop
    Z2 otherwise
k1 :=
    k1 ← 0
    for i ∈ 0 .. N - 1
        k1 ← k1 + 1
        if R_tec[i] ≥ R1_kor_lop
            {
                break
            }
    k1
k1 = 1
ii := k1 .. N
v_m[i] := (Q/η_ob)*(0.5/(b_r[i]*(π*R_tec[i] - Z[i]*δ_r[i])))
w[i] := v_m[i]/sin(π*β(R_tec[i])/180)
β1_pot := (180/π)*atan(v_m[0]/u1)
β1_pot = 29.4161
# ПОСТРОЕНИЕ вида лопастей
θ_tyl[i] := θ[i] + δ_r[i]/R_tec[i]
θ_rab[i] := θ[i] - δ_r[i]/R_tec[i]
θ_1[i] := π - θ[i]
θ_1_tyl[i] := θ_1[i] + δ_r[i]/R_tec[i]
θ_1_rab[i] := θ_1[i] - δ_r[i]/R_tec[i]
θ_2[ii] := θ_1[ii] - 2*π/Z2
θ_2_tyl[ii] := θ_2[ii] + δ_r[ii]/R_tec[ii]
θ_2_rab[ii] := θ_2[ii] - δ_r[ii]/R_tec[ii]
θ_3[i] := θ_1[i] - 2*π/Z1
θ_3_tyl[i] := θ_3[i] + δ_r[i]/R_tec[i]
θ_3_rab[i] := θ_3[i] - δ_r[i]/R_tec[i]
# Определение координат профиля для построения чертежа
# (принято шаг по углу фи=10 град)
Shag := 10
N_fi := ceil(θ[N]*180/(π*Shag))
N_fi = 13
j := 0 .. N_fi
jj := 0 .. N_fi - 1
ϕ[0] := 0  # - начальный угол
ϕ[jj + 1] :=
    (ϕ[jj] + Shag) if jj < N_fi - 1
    θ[N]*180/π otherwise
# Определение координат средней линии профиля для построения чертежа R=f(фи)
# ( Точки на рисунке см ниже. показаны "o")
SR_ := lspline(θ, R_tec)
# Аналогично для построения
# определим ширину РК
B(ϕ) := interp(SR_, θ, R_tec, ϕ)
Sb_ := lspline(R_tec, b_r)
R_sr[j] := B(ϕ[j]*π/180)  # - текущий радиус
B_(R) := interp(Sb_, R_tec, b_r, R)
ϕ_ := π - (ϕ*π/180)  # - текущий угол фи для построения графика
b_r_[j] := B_(R_sr[j])
R_sr[j] = [0.10055; 0.10755; 0.115112; 0.123292; 0.132153; 0.141768; 0.152219; 0.163601; 0.176024; 0.189614; 0.204518; 0.220911; 0.238998; 0.25865]
b_r_[j] = [0.0502; 0.0480013; 0.0456442; 0.0431378; 0.0405016; 0.03777; 0.034999; 0.0322752; 0.0297017; 0.0273187; 0.0251382; 0.0231491; 0.0212991; 0.0195]
ϕ[N_fi] = 129.822
θ[N]*180/π = 129.822
R_sr[N_fi] = 0.25865
R_tec[N] = 0.25865
SR_rab := lspline(θ_rab, R_tec)
SR_tyl := lspline(θ_tyl, R_tec)
B_rab(ϕ) := interp(SR_rab, θ_rab, R_tec, ϕ)
B_tyl(ϕ) := interp(SR_tyl, θ_tyl, R_tec, ϕ)
R_rab[j] := B_rab(ϕ[j]*π/180)
R_tyl[j] := B_tyl(ϕ[j]*π/180)
ϕ_rab := ϕ
ϕ_tyl := ϕ
ϕ_rab[N_fi] := θ_rab[N]*180/π
ϕ_tyl[N_fi] := θ_tyl[N]*180/π
R_rab[N_fi] := B_rab(ϕ_rab[N_fi]*π/180)
R_tyl[N_fi] := B_tyl(ϕ_tyl[N_fi]*π/180)
ϕ_rab[N_fi] = 127.201
ϕ_tyl[N_fi] = 132.443
R_rab[N_fi] = 0.25865
R_tyl[N_fi] = 0.25865
# текущий угол фи для построения графика
ϕ_rab_ := π - (ϕ_rab*π/180)
ϕ_tyl_ := π - (ϕ_tyl*π/180)
b_ ≡ 0.465
Rb_ ≡ 0.395
δ_ ≡ 0.5
Rδ_ ≡ 0.5
β_ ≡ 0.5
Rβ_ ≡ 0.5
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δ[0] = 0.01
δ[N] = 0.01
min(δ) = 0.01
max(δ) = 0.01
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β1_pot = 29.4161
C0 = 7.02334
u1 = 15.3205
v_m[0] = 8.63833
max(v_m) = 8.63833
v_m[N] = 6.64998
min(v_m) = 6.64704
max(v_m)/min(v_m) = 1.29957
w[0] = 24.1046
max(w) = 24.1046
w[N] = 15.7352
min(w) = 15.7352
max(w)/min(w) = 1.53189
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R_sr := 1000*R_sr
R_rab := 1000*R_rab
R_tyl := 1000*R_tyl
# Координаты входной кромки лопасти
ϕ[0] = 0
R_sr[0] = 100.55
0.5*10^3*δ[0] = 5
# Координаты профиля лопасти | Координаты покрывного диска
ϕ_rab[j] = [0; 10; 20; 30; 40; 50; 60; 70; 80; 90; 100; 110; 120; 127.201]
R_rab[j] = [105.759; 112.774; 120.35; 128.545; 137.421; 147.052; 157.519; 168.919; 181.36; 194.969; 209.894; 226.309; 244.421; 258.65]
ϕ_tyl[j] = [0; 10; 20; 30; 40; 50; 60; 70; 80; 90; 100; 110; 120; 132.443]
R_tyl[j] = [94.5571; 102.03; 109.594; 117.776; 126.637; 136.251; 146.7; 158.078; 170.495; 184.077; 198.972; 215.354; 233.426; 258.65]
R_sr[j] = [100.55; 107.55; 115.112; 123.292; 132.153; 141.768; 152.219; 163.601; 176.024; 189.614; 204.518; 220.911; 238.998; 258.65]
(1000*b_r_)[j] = [50.2; 48.0013; 45.6442; 43.1378; 40.5016; 37.77; 34.999; 32.2752; 29.7017; 27.3187; 25.1382; 23.1491; 21.2991; 19.5]
