t := 450
ρ := 844
H := 92
Zpot := 2
Qpod := 650
Pvs := 0.03
Patm := 0.1
Q := Qpod/3600 = 0.180556
Pabs := Pvs + Patm = 0.13
A := 7.553 + 2.1249 = 9.6779
B := 5395
Q_pot := Q/2 = 0.0902778
T := t + 273 = 723
p := 1
Given
S := 3.33
n_sin := 3000
log(p) == A - B/T
g := 9.81
n := n_sin*(1 - S/100) = 2900.1
Pnp := Find(p) = 164.413
dh_ras := (Pabs*10^6 - Pnp)/(9.81*ρ) = 15.6813
dh_ras := 15.7
ns := 3.65*n*sqrt(Q_pot)/H^0.75 = 107.067
C_kr := 1.6*ns + 600 = 771.307
h_kr := 10*(n*sqrt(Q_pot)/C_kr)^(4/3) = 11.7662
h_dop := 1.2*h_kr = 14.1194
D1pr := 4.25*10^3*(Q_pot/n)^(1/3) = 133.694
ηg := 1 - 0.42/(ln(D1pr)/ln(10) - 0.173)^2 = 0.889898
ηob := 1/(1 + 0.68*ns^(-2/3)) = 0.970725
ηdt := 1/(1 + 820/ns^2) = 0.933243
Qt := Q_pot/ηob = 0.0930004
η := ηob*ηg*ηdt = 0.806178
N := ρ*Q*H/(102*η) = 170.494
ρ*Q*H/(102*0.85) = 161.704
Nmax := 1.2*N = 204.593
M := 97500*Nmax/n = 6878.33
Dv := 10*(M/(0.2*150))^(1/3) = 61.205
Dvt := 1.25*Dv = 76.5063
Kv0 := 0.065
v0 := Kv0*(Qt*n^2)^(1/3) = 5.98894
D0 := 1000*sqrt((4*Qt/(π*v0)) + (Dvt/1000)^2) = 160.078
D1osn_otn := 0.8
D1 := D1osn_otn*D0 = 128.062
Kvm1 := 0.85
Vm1p := Kvm1*v0 = 5.0906
b1 := 1000*Qt/(π*D1*Vm1p*0.001) = 45.4092
β1 := 23
Z1 := 8
S1 := (1.25 - 1)/1.25*π*D1*sin(π*β1/180)/Z1 = 3.92997
S1 := 3.95
u1 := 0.001*D1*π*n/60 = 19.4461
K1 := 1/(1 - Z1*S1/(π*D1*sin(π*β1/180))) = 1.25159
β1o := 180/π*atan(Vm1p*K1/u1) = 18.141
δ1 := β1 - 180/π*atan(Vm1p*K1/u1) = 4.85902
Vm1 := K1*Vm1p = 6.37137
W1D1 := Vm1/sin(π*β1/180) = 16.3063
W1oD1 := Vm1/sin(π*β1o/180) = 20.4633
mo := 1.2
no := 0.3
ΔH_kr_ := mo*v0^2/(2*g) + no*W1oD1^2/(2*g) = 8.59657
C_kr_ := (n*sqrt(Q_pot))/(0.1*ΔH_kr_)^(3/4) = 976.021
Kvm2 := 1
Vm2p := Kvm2*Vm1p = 5.0906
Ht := H/ηg = 103.383
u2 := sqrt(2*g*Ht) = 45.0374
D2 := 1000*u2*2/(π*n/30) = 296.594
β2 := 23
Z2 := Z1 = 8
Z2otn := 1
P := 0.1
Ppr := 0.1
K2 := 1.1
X1 := 1
S2 := S1
a := 2*tan(π*β2/180)
Given
Ppr == 2/(Z1*Z2otn)*(0.6 + 0.6*sin(π*β2/180))/(1 - (D1/D2)^2)
P == ((2/(Z1*Z2otn)*(0.6 + 0.6*sin(π*β2/180))/(1 - (D1/D2)^2)) + (Z2otn - 1)*Ppr)/Z2otn
K2 == 1/(1 - ((Z1*Z2otn*S2)/(π*D2*sin(π*β2/180))))
u2 == (K2*Vm2p/a) + sqrt((K2*Vm2p/a)^2 + g*(1 + P)*Ht)
D2 == 1000*(60*u2)/(π*n)
X1 := Find(Ppr, P, K2, u2, D2)
X1 = [0.262308; 0.262308; 1.10005; 42.9793; 283.04]
Ppr := X1[0]
P := X1[1]
K2 := X1[2]
u2 := X1[3]
D2 := X1[4]
Vu2 := g*Ht/u2 = 23.597
Vm2 := K2*Vm2p = 5.59993
W2 := Vm2/sin(π*β2/180) = 14.3319
Kw := W1D1/W2 = 1.13776
Qt = 0.0930004
b2 := 1000*Qt/(π*0.001*D2*Vm2p) = 20.5456
α2 := (180/π)*atan(Vm2p/Vu2) = 12.1739
Q_pot = 0.0902778
V2p := sqrt(Vu2^2 + Vm2p^2) = 24.1399
C3 := 0.38*sqrt(2*9.81*92) = 16.1446
D3 := 1.038*289 = 299.982
D3 := 300
b3 := 2*1.1*(20.1 + 2*5) = 66.22
b := 66.2
Fg := Q/(C3*12) = 0.000931971
Fg*10^6/b3 = 14.0739
Cm3 := Q/(π*D3*10^-3*b3*10^-3) = 2.89301
Cu2 := 23.1
Cu3 := Cu2*289/300 = 22.253
a3 := 180/π*atan(Cm3/Cu3) = 7.40723
