ρ := 7900
M1 := π*159^2*558*ρ/(4*1000*1000000) = 87.5277
L := 558 + 277 + 140 + 550 + 2705 + 737 + 56 + 235 + 50 + 55 + 50 + 70 = 5483
M2 := π*168^2*277*ρ/(4*1000*1000000) = 48.5082
MASSA := π*163^2*L*ρ/(4*1000*1000000) = 903.879
M3 := π*242^2*140*ρ/(4*1000*1000000) = 50.8716
M4 := π*300^2*550*ρ/(4*1000*1000000) = 307.13
M51 := π*(280 - 224)^2*702*ρ/(4*1000*1000000) = 13.6594
M5 := π*(280 - 224)^2*2705*ρ/(4*1000*1000000) = 52.6333
M52 := π*(280 - 224)^2*2003*ρ/(4*1000*1000000) = 38.9739
M6 := π*253^2*737*ρ/(4*1000*1000000) = 292.702
(0.13 - 0.1)*(π*163^2/4) = 626.017
M7 := π*195^2*56*ρ/(4*1000*1000000) = 13.2122
M8 := π*68^2*235*ρ/(4*1000*1000000) = 6.74222
M9 := π*180^2*50*ρ/(4*1000*1000000) = 10.0515
4*8000*9.81/(π*(0.4^2 - 0.28^2)*0.91) = 1345667
M10 := π*265^2*55*ρ/(4*1000*1000000) = 23.9647
4.1*(1.87*10^-2*42.8/(100*167.7))^(1/2) = 0.0283244
M11 := π*165^2*50*ρ/(4*1000*1000000) = 8.44607
M12 := π*61^2*70*ρ/(4*1000*1000000) = 1.61612
Mval := M1 + M2 + M3 + M4 + M5 + M6 + M7 + M8 + M9 + M10 + M11 + M12 = 903.405
Vval := Mval/ρ = 0.114355
Mpval := M52 + M6 + M7 + M8 + M9 + M10 + M11 + M12 = 395.709
Vpval := Mpval/ρ = 0.0500897
12.15*sqrt(6*0.005)*sqrt(1.87*10^-2*2*10^-3*10/166.7) = 0.00315214
Vvd1 := π/4*(0.289^2 - 0.0612^2)*0.003 + π/12*((0.177^2 + 0.177*0.077 + 0.077^2) - 0.0612^2)*0.038 = 0.000656949
Vvd := 2*Vvd1 = 0.0013139
Mvd := ρ*Vvd = 10.3798
Vpd1 := π/4*(0.289^2 - 0.165^2)*0.003 + π/4*(0.171^2 - 0.165^2)*0.012 + π/4*(0.175^2 - 0.165^2)*0.02 = 0.000205052
Vpd := Vpd1*2 = 0.000410104
Mpd := ρ*Vpd = 3.23982
Vlop := (0.0392 + 0.0201)/2*0.192*0.005 = 2.8464e-5
Mlop := Vlop*ρ = 0.224866
Vkol := 2*7*Vlop + Vpd + Vvd = 0.0021225
Mkol := ρ*Vkol = 16.7677
Mrot := Mkol + Mval = 920.173
Vpog := Vpval + Vkol = 0.0522122
Fa := 844*9.81*Vpog = 432.298
Fa/9.82 = 44.0222
