# ПРОФИЛИРОВАНИЕ  ЛОПАСТИ РАБОЧЕГО КОЛЕСА
N := 100
i := 0 .. N
R0 := 0.5*0.165
R1 := 0.5*0.1485
b1 := 0.0392
β1 := 20
δ1 := 0.005
Q := 650/3600
η_ob := 0.971
n := 2900
R_vt := 0.5*0.077
R2 := 0.5*0.289
b2 := 0.0201
β2 := 23
δ2 := 0.005
Z1 := 7
R1_kor_lop := 1*0
k_Z := 1
Z2 := k_Z*Z1
# (k_Z=1 - коротких лопаток нет)
C0 := Q/(π*(R0^2 - R_vt^2)*η_ob)
C0 = 11.1174
u1 := (π*n*R1)/30
u1 = 22.5488
m := 0 .. 2
Rb[0] := R1
Rb[2] := R2
Rb[1] := R1 + Rb_*(R2 - R1)
b[1] := b_*(b2 + b1)
b[0] := b1
b[2] := b2
Rβ[0] := R1
Rβ[2] := R2
Rβ[1] := R1 + Rβ_*(R2 - R1)
β[1] := β_*(β2 + β1)
β[0] := β1
β[2] := β2
Rδ[0] := R1
Rδ[2] := R2
Rδ[1] := R1 + Rδ_*(R2 - R1)
δ[1] := δ_*(δ2 + δ1)
δ[0] := δ1
δ[2] := δ2
data_b[:, 0] := Rb
data_b[:, 1] := b
data_β[:, 0] := Rβ
data_β[:, 1] := β
data_δ[:, 0] := Rδ
data_δ[:, 1] := δ
data_b := csort(data_b, 0)
data_β := csort(data_β, 0)
data_δ := csort(data_δ, 0)
Sb := lspline(Rb, b)
Sβ := lspline(Rβ, β)
Sδ := lspline(Rδ, δ)
B(R_tec) := interp(Sb, Rb, b, R_tec)
β(R_tec) := interp(Sβ, Rβ, β, R_tec)
δ(R_tec) := interp(Sδ, Rδ, δ, R_tec)
R_tec[i] := R1 + (R2 - R1)*i/N
b_r[i] := B(R_tec[i])
β_r[i] := β(R_tec[i])
θ[i] := integral(1/(r_t*tan(π*β(r_t)/180)), r_t = R1 .. R_tec[i])
δ_r[i] := 0.5*δ(R_tec[i])/sin(π*β(R_tec[i])/180)
δ[i] := δ(R_tec[i])
Z[i] :=
    Z1 if R_tec[i] ≤ R1_kor_lop
    Z2 otherwise
k1 :=
    k1 ← 0
    for i ∈ 0 .. N - 1
        k1 ← k1 + 1
        if R_tec[i] ≥ R1_kor_lop
            {
                break
            }
    k1
k1 = 1
ii := k1 .. N
v_m[i] := (Q/η_ob)*(0.5/(b_r[i]*(π*R_tec[i] - Z[i]*δ_r[i])))
w[i] := v_m[i]/sin(π*β(R_tec[i])/180)
β1_pot := (180/π)*atan(v_m[0]/u1)
β1_pot = 30.0121
# ПОСТРОЕНИЕ вида лопастей
θ_tyl[i] := θ[i] + δ_r[i]/R_tec[i]
θ_rab[i] := θ[i] - δ_r[i]/R_tec[i]
θ_1[i] := π - θ[i]
θ_1_tyl[i] := θ_1[i] + δ_r[i]/R_tec[i]
θ_1_rab[i] := θ_1[i] - δ_r[i]/R_tec[i]
θ_2[ii] := θ_1[ii] - 2*π/Z2
θ_2_tyl[ii] := θ_2[ii] + δ_r[ii]/R_tec[ii]
θ_2_rab[ii] := θ_2[ii] - δ_r[ii]/R_tec[ii]
θ_3[i] := θ_1[i] - 2*π/Z1
θ_3_tyl[i] := θ_3[i] + δ_r[i]/R_tec[i]
θ_3_rab[i] := θ_3[i] - δ_r[i]/R_tec[i]
# Определение координат профиля для построения чертежа
# (принято шаг по углу фи=10 град)
Shag := 10
N_fi := ceil(θ[N]*180/(π*Shag))
N_fi = 10
j := 0 .. N_fi
jj := 0 .. N_fi - 1
ϕ[0] := 0  # - начальный угол
ϕ[jj + 1] :=
    (ϕ[jj] + Shag) if jj < N_fi - 1
    θ[N]*180/π otherwise
# Определение координат средней линии профиля для построения чертежа R=f(фи)
# ( Точки на рисунке см ниже. показаны "o")
SR_ := lspline(θ, R_tec)
# Аналогично для построения
# определим ширину РК
B(ϕ) := interp(SR_, θ, R_tec, ϕ)
Sb_ := lspline(R_tec, b_r)
R_sr[j] := B(ϕ[j]*π/180)  # - текущий радиус
B_(R) := interp(Sb_, R_tec, b_r, R)
ϕ_ := π - (ϕ*π/180)  # - текущий угол фи для построения графика
b_r_[j] := B_(R_sr[j])
R_sr[j] = [0.07425; 0.0791305; 0.0843565; 0.0899583; 0.0959721; 0.102443; 0.109428; 0.117004; 0.125274; 0.134383; 0.1445]
b_r_[j] = [0.0392; 0.0377385; 0.0361834; 0.0345397; 0.0328159; 0.0310122; 0.0291169; 0.0271121; 0.0249704; 0.0226509; 0.0201]
ϕ[N_fi] = 99.9877
θ[N]*180/π = 99.9877
R_sr[N_fi] = 0.1445
R_tec[N] = 0.1445
SR_rab := lspline(θ_rab, R_tec)
SR_tyl := lspline(θ_tyl, R_tec)
B_rab(ϕ) := interp(SR_rab, θ_rab, R_tec, ϕ)
B_tyl(ϕ) := interp(SR_tyl, θ_tyl, R_tec, ϕ)
R_rab[j] := B_rab(ϕ[j]*π/180)
R_tyl[j] := B_tyl(ϕ[j]*π/180)
ϕ_rab := ϕ
ϕ_tyl := ϕ
ϕ_rab[N_fi] := θ_rab[N]*180/π
ϕ_tyl[N_fi] := θ_tyl[N]*180/π
R_rab[N_fi] := B_rab(ϕ_rab[N_fi]*π/180)
R_tyl[N_fi] := B_tyl(ϕ_tyl[N_fi]*π/180)
ϕ_rab[N_fi] = 97.4507
ϕ_tyl[N_fi] = 102.525
R_rab[N_fi] = 0.1445
R_tyl[N_fi] = 0.1445
# текущий угол фи для построения графика
ϕ_rab_ := π - (ϕ_rab*π/180)
ϕ_tyl_ := π - (ϕ_tyl*π/180)
b_ ≡ 0.57
Rb_ ≡ 0.26
δ_ ≡ 0.6
Rδ_ ≡ 0.8
β_ ≡ 0.5
Rβ_ ≡ 0.7
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δ[0] = 0.005
δ[N] = 0.005
min(δ) = 0.005
max(δ) = 0.00641409
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β1_pot = 30.0121
C0 = 11.1174
u1 = 22.5488
v_m[0] = 13.0249
max(v_m) = 13.0249
v_m[N] = 11.3047
min(v_m) = 11.117
max(v_m)/min(v_m) = 1.17162
w[0] = 38.0822
max(w) = 38.0822
w[N] = 28.9322
min(w) = 28.9322
max(w)/min(w) = 1.31626
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R_sr := 1000*R_sr
R_rab := 1000*R_rab
R_tyl := 1000*R_tyl
# Координаты входной кромки лопасти
ϕ[0] = 0
R_sr[0] = 74.25
0.5*10^3*δ[0] = 2.5
# Координаты профиля | Коорлинаты покрывного диска
ϕ_rab[j] = [0; 10; 20; 30; 40; 50; 60; 70; 80; 90; 97.4507]
R_rab[j] = [76.9361; 81.9558; 87.3231; 93.0614; 99.1975; 105.763; 112.798; 120.353; 128.499; 137.341; 144.5]
ϕ_tyl[j] = [0; 10; 20; 30; 40; 50; 60; 70; 80; 90; 102.525]
R_tyl[j] = [71.4717; 76.3572; 81.437; 86.889; 92.7565; 99.0948; 105.977; 113.502; 121.81; 131.108; 144.5]
R_sr[j] = [74.25; 79.1305; 84.3565; 89.9583; 95.9721; 102.443; 109.428; 117.004; 125.274; 134.383; 144.5]
(1000*b_r_)[j] = [39.2; 37.7385; 36.1834; 34.5397; 32.8159; 31.0122; 29.1169; 27.1121; 24.9704; 22.6509; 20.1]
