t := 450
ρ := 844
H := 92
Zpot := 2
Qpod := 650
Pvs := 0.03
Patm := 0.1
Q := Qpod/3600 = 0.180556
Pabs := Pvs + Patm = 0.13
A := 7.553 + 2.1249 = 9.6779
B := 5395
Q_pot := Q/2 = 0.0902778
T := t + 273 = 723
p := 1
Given
S := 3
n_sin := 1500
log(p) == A - B/T
g := 9.81
n := n_sin*(1 - S/100) = 1455
Pnp := Find(p) = 164.413
hz := sqrt(H)/n = 0.00659221
dh_ras := (Pabs*10^6 - Pnp)/(9.81*ρ) = 15.6813
ns := 3.65*n*sqrt(Q_pot)/92^0.75 = 53.7162
C_kr := 1.6*ns + 600 = 685.946
h_kr := 10*(n*sqrt(Q_pot)/C_kr)^(4/3) = 5.48468
h_dop := 1.2*h_kr = 6.58162
D1pr := 4.25*10^3*(Q_pot/n)^(1/3) = 168.253
ηg := 1 - 0.42/(ln(D1pr)/ln(10) - 0.173)^2 = 0.900348
ηob := 1/(1 + 0.68*ns^(-2/3)) = 0.954413
ηdt := 1/(1 + 820/ns^2) = 0.778703
Qt := Q_pot/ηob = 0.0945899
η := ηob*ηg*ηdt = 0.669142
N := ρ*Q*H/(102*η) = 205.41
Nmax := 1.2*N = 246.492
M := 97500*Nmax/n = 16517.5
Dv := 10*(M/(0.2*150))^(1/3) = 81.9611
Dvt := 1.25*Dv = 102.451
Kv0 := 0.06
v0 := Kv0*(Qt*n^2)^(1/3) = 3.51028
D0 := 1000*sqrt((4*Qt/(π*v0)) + (Dvt/1000)^2) = 211.674
D1osn_otn := 0.95
D1 := D1osn_otn*D0 = 201.09
Kvm1 := 0.85
Vm1p := Kvm1*v0 = 2.98374
b1 := 1000*Qt/(π*D1*Vm1p*0.001) = 50.1815
β1 := 24
Z1 := 7
S1 := (1.25 - 1)/1.25*π*D1*sin(π*β1/180)/Z1 = 7.34151
u1 := 0.001*D1*π*n/60 = 15.3198
K1 := 1/(1 - Z1*S1/(π*D1*sin(π*β1/180))) = 1.25
β1o := 180/π*atan(Vm1p*K1/u1) = 13.6828
δ1 := β1 - 180/π*atan(Vm1p*K1/u1) = 10.3172
Vm1 := K1*Vm1p = 3.72967
W1D1 := Vm1/sin(π*β1/180) = 9.16974
W1oD1 := Vm1/sin(π*β1o/180) = 15.7672
mo := 1.2
no := 0.4
ΔH_kr_ := mo*v0^2/(2*g) + no*W1oD1^2/(2*g) = 5.82205
C_kr_ := (n*sqrt(Q_pot))/(0.1*ΔH_kr_)^(3/4) = 655.913
Kvm2 := 1
Vm2p := Kvm2*Vm1p = 2.98374
Ht := H/ηg = 102.183
u2 := sqrt(2*g*Ht) = 44.7753
D2 := 1000*u2*2/(π*n/30) = 587.728
β2 := 25
Z2 := Z1 = 7
Z2otn := 1
P := 0.1
Ppr := 0.1
K2 := 1.1
X1 := 1
S2 := 4
a := 2*tan(π*β2/180)
Given
Ppr == 2/(Z1*Z2otn)*(0.6 + 0.6*sin(π*β2/180))/(1 - (D1/D2)^2)
P == ((2/(Z1*Z2otn)*(0.6 + 0.6*sin(π*β2/180))/(1 - (D1/D2)^2)) + (Z2otn - 1)*Ppr)/Z2otn
K2 == 1/(1 - ((Z1*Z2otn*S2)/(π*D2*sin(π*β2/180))))
u2 == (K2*Vm2p/a) + sqrt((K2*Vm2p/a)^2 + g*(1 + P)*Ht)
D2 == 1000*(60*u2)/(π*n)
X1 := Find(Ppr, P, K2, u2, D2)
X1 = [0.287285; 0.287285; 1.0425; 39.4118; 517.326]
Ppr := X1[0]
P := X1[1]
K2 := X1[2]
u2 := X1[3]
D2 := X1[4]
Vu2 := g*Ht/u2 = 25.4343
Vm2 := K2*Vm2p = 3.11054
W2 := Vm2/sin(π*β2/180) = 7.36016
Kw := W1D1/W2 = 1.24586
Qt = 0.0945899
b2 := 1000*Qt/(π*0.001*D2*Vm2p) = 19.5061
α2 := (180/π)*atan(Vm2p/Vu2) = 6.69086
V2p := sqrt(Vu2^2 + Vm2p^2) = 25.6087
